// SBML level 2 version 4

model iGameModel()

  // Compartments:
  compartment Flask = 0.4;
  compartment E_coli in Flask = 1e-14;

  // Species:
  species sPecIes0 in Flask = 1e-20;  // substance in mole
  species sPecIes1 in E_coli = 1e-22/E_coli;  // substance in mole
  species mrna in E_coli = 0;
  species prot in E_coli = 0;
  species sPecIes4 in E_coli = 0;
  species sPecIes5 in E_coli = 0;
  species sPecIes6 in E_coli = 0;

  // Parameters:
  Avogadro = 6.022e23 item_per_mole;

  // Reactions:
  amplification_of_Ecoli: => sPecIes0; amplification_of_Ecoli_kgrowth*(1 - sPecIes0/amplification_of_Ecoli_maxc)*sPecIes0*Flask;
    amplification_of_Ecoli_kgrowth = 0.0005766 per_second; amplification_of_Ecoli_maxc = 1.66e-12 per_second;
  rEactIon1: => sPecIes1; rEactIon1_kgrowth*sPecIes1*E_coli; rEactIon1 is "amplification of tm_pSB1A3";
    rEactIon1_kgrowth = 1 per_second;
  rEactIon2: => sPecIes1; -1*rEactIon2_ksup*(sPecIes1/rEactIon2_copynum)*sPecIes1*E_coli*E_coli*Avogadro; rEactIon2 is "suppression of tm_pSB1A3";
    rEactIon2_ksup = 0.1 per_second; rEactIon2_copynum = 200 item;
  rEactIon3: sPecIes1 => ; rEactIon3_kgrowth*(1 - sPecIes0/rEactIon3_maxc)*sPecIes1*E_coli; rEactIon3 is "template dilution in E_coli";  // modifiers: sPecIes0
    rEactIon3_kgrowth = 0.0005766 per_second; rEactIon3_maxc = 1.66e-12 per_second;
  rEactIon4: => mrna; rEactIon4_k_tc*sPecIes1*E_coli; rEactIon4 is "transcription";  // modifiers: sPecIes1
    rEactIon4_k_tc = 0.5 per_second;
  translation: => prot; k_tl*mrna*E_coli;  // modifiers: mrna
    k_tl = 6.93 per_second;
  rEactIon6: mrna => ; rEactIon6_kdeg*mrna*E_coli; rEactIon6 is "template rna degradation in E_coli";
    rEactIon6_kdeg = 0.001 per_second;
  rEactIon7: mrna => ; rEactIon7_kgrowth*(1 - sPecIes0/rEactIon7_maxc)*mrna*E_coli; rEactIon7 is "template dilution in E_coli";  // modifiers: sPecIes0
    rEactIon7_kgrowth = 0.0005766 per_second; rEactIon7_maxc = 1.66e-12 per_second;
  rEactIon8: prot + prot -> sPecIes4; rEactIon8_kon*prot*prot*E_coli; rEactIon8 is "dimerization lacI";
    rEactIon8_kon = 1000000000 litre_per_mole_per_second;
  rEactIon9: prot => ; rEactIon9_kdeg*prot*E_coli; rEactIon9 is "template protein degradation in E_coli";
    rEactIon9_kdeg = 0.001 per_second;
  rEactIon10: prot => ; rEactIon10_kgrowth*(1 - sPecIes0/rEactIon10_maxc)*prot*E_coli; rEactIon10 is "template dilution in E_coli";  // modifiers: sPecIes0
    rEactIon10_kgrowth = 0.0005766 per_second; rEactIon10_maxc = 1.66e-12 per_second;
  rEactIon11: sPecIes4 + sPecIes4 -> sPecIes5; rEactIon11_kon*sPecIes4*sPecIes4*E_coli; rEactIon11 is "dimerization lacI2";
    rEactIon11_kon = 1000000000 litre_per_mole_per_second;
  rEactIon12: sPecIes4 -> prot + prot; rEactIon12_koff*sPecIes4*E_coli; rEactIon12 is "dimerization lacI";
    rEactIon12_koff = 10 per_second;
  rEactIon13: sPecIes4 => ; rEactIon13_kgrowth*(1 - sPecIes0/rEactIon13_maxc)*sPecIes4*E_coli; rEactIon13 is "template dilution in E_coli";  // modifiers: sPecIes0
    rEactIon13_kgrowth = 0.0005766 per_second; rEactIon13_maxc = 1.66e-12 per_second;
  rEactIon14: sPecIes5 -> sPecIes4 + sPecIes4; rEactIon14_koff*sPecIes5*E_coli; rEactIon14 is "dimerization lacI2";
    rEactIon14_koff = 10 per_second;
  rEactIon15: sPecIes1 + sPecIes5 -> sPecIes6; rEactIon15_kon*sPecIes1*sPecIes5*E_coli; rEactIon15 is "binding placI:lacI4";
    rEactIon15_kon = 2000000000 litre_per_mole_per_second;
  rEactIon16: sPecIes5 => ; rEactIon16_kgrowth*(1 - sPecIes0/rEactIon16_maxc)*sPecIes5*E_coli; rEactIon16 is "template dilution in E_coli";  // modifiers: sPecIes0
    rEactIon16_kgrowth = 0.0005766 per_second; rEactIon16_maxc = 1.66e-12 per_second;
  rEactIon17: sPecIes6 -> sPecIes1 + sPecIes5; rEactIon17_koff*sPecIes6*E_coli; rEactIon17 is "binding placI:lacI4";
    rEactIon17_koff = 0.04 per_second;
  rEactIon18: sPecIes6 => ; rEactIon18_kgrowth*(1 - sPecIes0/rEactIon18_maxc)*sPecIes6*E_coli; rEactIon18 is "template dilution in E_coli";  // modifiers: sPecIes0
    rEactIon18_kgrowth = 0.0005766 per_second; rEactIon18_maxc = 1.66e-12 per_second;
  rEactIon19: => sPecIes1; rEactIon19_kgrowth*sPecIes6*E_coli; rEactIon19 is "amplification of tm_pSB1A3";  // modifiers: sPecIes6
    rEactIon19_kgrowth = 1 per_second;
  rEactIon20: => sPecIes1; -1*rEactIon20_ksup*(sPecIes6/rEactIon20_copynum)*sPecIes1*E_coli*E_coli*Avogadro; rEactIon20 is "suppression of tm_pSB1A3";  // modifiers: sPecIes6
    rEactIon20_ksup = 0.1 per_second; rEactIon20_copynum = 200 item;
  rEactIon21: => sPecIes1; -1*rEactIon21_ksup*(sPecIes1/rEactIon21_copynum)*sPecIes6*E_coli*E_coli*Avogadro; rEactIon21 is "suppression of tm_pSB1A3";  // modifiers: sPecIes6
    rEactIon21_ksup = 0.1 per_second; rEactIon21_copynum = 200 item;
  rEactIon22: => sPecIes1; -1*rEactIon22_ksup*(sPecIes6/rEactIon22_copynum)*sPecIes6*E_coli*E_coli*Avogadro; rEactIon22 is "suppression of tm_pSB1A3";  // modifiers: sPecIes6
    rEactIon22_ksup = 0.1 per_second; rEactIon22_copynum = 200 item;
  rEactIon23: => mrna; rEactIon23_k_tc*sPecIes6*E_coli; rEactIon23 is "transcription";  // modifiers: sPecIes6
    rEactIon23_k_tc = 0.0005 per_second;

  // Unit definitions:
  unit per_second = 1 / second;
  unit mole_per_litre = mole / litre;
  unit litre_per_mole_per_second = litre / (mole * second);
  unit item_per_mole = item / mole;
end
