// SBML level 2 version 4

model iGameModel()

  // Compartments:
  compartment Flask = 0.4;
  compartment E_coli in Flask = 1e-14;

  // Species:
  species sPecIes0 in Flask = 1e-20;  // substance in mole
  species sPecIes1 in E_coli = 1e-22/E_coli;  // substance in mole
  species mrna in E_coli = 0;
  species prot in E_coli = 0;
  species sPecIes4 in E_coli = 0;
  species sPecIes5 in E_coli = 0;
  species sPecIes6 in E_coli = 0;

  // Reactions:
  amplification_of_Ecoli: => sPecIes0; amplification_of_Ecoli_kgrowth*(1 - sPecIes0/maxc)*sPecIes0*Flask;
    amplification_of_Ecoli_kgrowth = 0.0005766 per_second; maxc = 1.66e-12 per_second;
  amplification_of_tm_pSB1A3: => sPecIes1; amplification_of_tm_pSB1A3_kgrowth*sPecIes1*E_coli;
    amplification_of_tm_pSB1A3_kgrowth = 1 per_second;
  rEactIon2: => mrna; rEactIon2_k_tc*sPecIes1*E_coli; rEactIon2 is "transcription";  // modifiers: sPecIes1
    rEactIon2_k_tc = 0.5 per_second;
  translation: => prot; k_tl*mrna*E_coli;  // modifiers: mrna
    k_tl = 6.93 per_second;
  rEactIon4: prot + prot -> sPecIes4; rEactIon4_kon*prot*prot*E_coli; rEactIon4 is "dimerization lacI";
    rEactIon4_kon = 1000000000 litre_per_mole_per_second;
  rEactIon5: sPecIes4 + sPecIes4 -> sPecIes5; rEactIon5_kon*sPecIes4*sPecIes4*E_coli; rEactIon5 is "dimerization lacI2";
    rEactIon5_kon = 1000000000 litre_per_mole_per_second;
  rEactIon6: sPecIes4 + sPecIes4 -> sPecIes5; rEactIon6_kon*sPecIes4*sPecIes4*E_coli; rEactIon6 is "dimerization lacI2";
    rEactIon6_kon = 1000000000 litre_per_mole_per_second;
  rEactIon7: sPecIes4 + sPecIes4 -> sPecIes5; rEactIon7_kon*sPecIes4*sPecIes4*E_coli; rEactIon7 is "dimerization lacI2";
    rEactIon7_kon = 1000000000 litre_per_mole_per_second;
  rEactIon8: sPecIes4 + sPecIes4 -> sPecIes5; rEactIon8_kon*sPecIes4*sPecIes4*E_coli; rEactIon8 is "dimerization lacI2";
    rEactIon8_kon = 1000000000 litre_per_mole_per_second;
  rEactIon9: sPecIes4 -> prot + prot; rEactIon9_koff*sPecIes4*E_coli; rEactIon9 is "dimerization lacI";
    rEactIon9_koff = 10 per_second;
  rEactIon10: sPecIes4 -> prot + prot; rEactIon10_koff*sPecIes4*E_coli; rEactIon10 is "dimerization lacI";
    rEactIon10_koff = 10 per_second;
  rEactIon11: sPecIes1 + sPecIes5 -> sPecIes6; rEactIon11_kon*sPecIes1*sPecIes5*E_coli; rEactIon11 is "binding placI:lacI4";
    rEactIon11_kon = 2000000000 litre_per_mole_per_second;
  rEactIon12: sPecIes1 + sPecIes5 -> sPecIes6; rEactIon12_kon*sPecIes1*sPecIes5*E_coli; rEactIon12 is "binding placI:lacI4";
    rEactIon12_kon = 2000000000 litre_per_mole_per_second;
  rEactIon13: sPecIes1 + sPecIes5 -> sPecIes6; rEactIon13_kon*sPecIes1*sPecIes5*E_coli; rEactIon13 is "binding placI:lacI4";
    rEactIon13_kon = 2000000000 litre_per_mole_per_second;
  rEactIon14: sPecIes1 + sPecIes5 -> sPecIes6; rEactIon14_kon*sPecIes1*sPecIes5*E_coli; rEactIon14 is "binding placI:lacI4";
    rEactIon14_kon = 2000000000 litre_per_mole_per_second;
  rEactIon15: sPecIes1 + sPecIes5 -> sPecIes6; rEactIon15_kon*sPecIes1*sPecIes5*E_coli; rEactIon15 is "binding placI:lacI4";
    rEactIon15_kon = 2000000000 litre_per_mole_per_second;
  rEactIon16: sPecIes1 + sPecIes5 -> sPecIes6; rEactIon16_kon*sPecIes1*sPecIes5*E_coli; rEactIon16 is "binding placI:lacI4";
    rEactIon16_kon = 2000000000 litre_per_mole_per_second;
  rEactIon17: sPecIes1 + sPecIes5 -> sPecIes6; rEactIon17_kon*sPecIes1*sPecIes5*E_coli; rEactIon17 is "binding placI:lacI4";
    rEactIon17_kon = 2000000000 litre_per_mole_per_second;
  rEactIon18: sPecIes1 + sPecIes5 -> sPecIes6; rEactIon18_kon*sPecIes1*sPecIes5*E_coli; rEactIon18 is "binding placI:lacI4";
    rEactIon18_kon = 2000000000 litre_per_mole_per_second;
  rEactIon19: => sPecIes7; rEactIon19_k_tc*sPecIes6*E_coli; rEactIon19 is "transcription";  // modifiers: sPecIes6
    rEactIon19_k_tc = 0.0005 per_second;

  // Unit definitions:
  unit per_second = 1 / second;
  unit mole_per_litre = mole / litre;
  unit litre_per_mole_per_second = litre / (mole * second);
end
